*Heading
** Job name: master_file Model name: Model-1
** Generated by: Abaqus/CAE 2020
*Preprint, echo=NO, model=NO, history=NO, contact=NO
**
** PARTS
**
*Part, name=Part-1
*End Part
**
**
** ASSEMBLY
**
*Assembly, name=Assembly
**
*Instance, name=Part-1-1, part=Part-1
*Node
      1,          25.,          20.,         100.
      2,          25.,    11.666667,         100.
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*Element, type=C3D8R
  1,  45,  46,  50,  49,   1,   2,   6,   5
  2,  46,  47,  51,  50,   2,   3,   7,   6
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*Nset, nset=Set-1, generate
   1,  264,    1
*Elset, elset=Set-1, generate
   1,  150,    1
** Section: Section-1
*Solid Section, elset=Set-1, material=Material-1
,
*End Instance
**
*Nset, nset=disp, instance=Part-1-1
 44,
*Nset, nset=fixed, instance=Part-1-1
   1,   2,   3,   4,  45,  46
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*Elset, elset=fixed, instance=Part-1-1
   1,   2,   3,  31,  32,  33,  61,  62,  63,  91,  92,  93, 121, 122, 123
*Nset, nset=load, instance=Part-1-1
  44, 264
*End Assembly
**
** MATERIALS
**
*Material, name=Material-1
*Elastic
210000., 0.25
** ----------------------------------------------------------------
**
** STEP: Step-1
**
*Step, name=Step-1, nlgeom=YES
*Static
1., 1., 1e-05, 1.
**
** BOUNDARY CONDITIONS
**
** Name: fixed Type: Symmetry/Antisymmetry/Encastre
*Boundary
fixed, ENCASTRE
**
** LOADS
**
** Name: Load-1   Type: Concentrated force
*Cload
load, 2, -50000.
**
** OUTPUT REQUESTS
**
*Restart, write, frequency=0
**
** FIELD OUTPUT: F-Output-1
**
*Output, field, variable=PRESELECT
**
** HISTORY OUTPUT: H-Output-1
**
*Output, history
*Energy Output
ALLIE, ALLSE
**
** HISTORY OUTPUT: disp_hisory
**
*Node Output, nset=disp
U2,
*End Step
